<?xml version="1.0"?>
<?xml-stylesheet type="text/xsl" href="http://jsbsim.sourceforge.net/JSBSim.xsl"?>
<fdm_config name="X8" version="2.0" release="ALPHA"
	xmlns:xsi="http://www.w3.org/2001/XMLSchema-instance"
	xsi:noNamespaceSchemaLocation="http://jsbsim.sourceforge.net/JSBSim.xsd">

    <fileheader>
        <author> Kristoffer Gryte </author>
		<filecreationdate> 19/04/2015 </filecreationdate>
        <version> Version 0.01 </version>
        <description> Models a Skywalker X8 </description>
    </fileheader>

	<metrics><!-- FLIES -->
        <wingarea unit="FT2"> 8.072932812532 </wingarea>
        <wingspan unit="FT"> 6.8897637795 </wingspan>
        <chord unit="FT"> 1.171728535714286 </chord>
        <htailarea unit="IN2"> 0 </htailarea>
        <htailarm unit="IN"> 0 </htailarm>
        <vtailarea unit="IN2"> 0 </vtailarea>
        <vtailarm unit="IN"> 0 </vtailarm>
		<location name="AERORP" unit="IN"><!--CG-->
            <x> 17.3228346457 </x>
			<!--<x> 14.72 </x>-->
            <y> 0 </y>
            <z> 0 </z>
        </location>
        <location name="EYEPOINT" unit="IN">
            <x> 20 </x>
            <y> 0 </y>
            <z> 5 </z>
        </location>
        <location name="VRP" unit="IN">
            <x> 0 </x>
            <y> 0 </y>
            <z> 0 </z>
        </location>
    </metrics>

	<mass_balance><!--FLIES -->
        <ixx unit="SLUG*FT2"> 0.2471 </ixx>
		<iyy unit="SLUG*FT2"> 0.1033 </iyy>
        <izz unit="SLUG*FT2"> 0.2950 </izz>
        <ixy unit="SLUG*FT2"> 0 </ixy>
        <ixz unit="SLUG*FT2"> -0.0214 </ixz>
        <iyz unit="SLUG*FT2"> 0 </iyz>
        <emptywt unit="LBS"> 7.4163504999 </emptywt>
        <location name="CG" unit="IN">
            <x> 17.3228346457 </x>
            <y> 0 </y>
            <z> 0 </z>
        </location>
    </mass_balance>

	<ground_reactions> <!--FLIES-->
        <contact type="BOGEY" name="LEFT_MLG">
            <location unit="IN">
            	<x> 17.3228346457 </x>
                <y> -12.9 </y>
                <z> -10.1 </z>
            </location>
            <static_friction> 0.8 </static_friction>
            <dynamic_friction> 0.5 </dynamic_friction>
            <rolling_friction> 0.1 </rolling_friction>
            <spring_coeff unit="LBS/FT"> 48 </spring_coeff>
            <damping_coeff unit="LBS/FT/SEC"> 5 </damping_coeff>
            <max_steer unit="DEG"> 0.0 </max_steer>
            <brake_group> NONE </brake_group>
            <retractable>0</retractable>
        </contact>
        <contact type="BOGEY" name="RIGHT_MLG">
            <location unit="IN">
            	<x> 17.3228346457 </x>
                <y> 12.9 </y>
                <z> -10.1 </z>
            </location>
            <static_friction> 0.8 </static_friction>
            <dynamic_friction> 0.5 </dynamic_friction>
            <rolling_friction> 0.1 </rolling_friction>
            <spring_coeff unit="LBS/FT"> 48 </spring_coeff>
            <damping_coeff unit="LBS/FT/SEC"> 5 </damping_coeff>
            <max_steer unit="DEG"> 0.0 </max_steer>
            <brake_group> NONE </brake_group>
            <retractable>0</retractable>
        </contact>
        <contact type="BOGEY" name="NOSE_LG">
            <location unit="IN">
                <x> 0.9 </x>
                <y> 0 </y>
                <z> -8 </z>
            </location>
            <static_friction> 8.0 </static_friction>
            <dynamic_friction> 5.0 </dynamic_friction>
            <rolling_friction> 0.1 </rolling_friction>
            <spring_coeff unit="LBS/FT"> 48 </spring_coeff>
            <damping_coeff unit="LBS/FT/SEC"> 5 </damping_coeff>
            <max_steer unit="DEG"> 360.0 </max_steer>
            <brake_group> NONE </brake_group>
            <retractable>0</retractable>
        </contact>
    </ground_reactions>

    <propulsion><!--FLIES TODO: fix pfactor-->
        <engine file="hackerA40">
            <location unit="IN">
                <x> 30.6 </x>
                <y> 0 </y>
                <z> 0 </z>
            </location>
            <orient unit="DEG">
                <roll> 0.0 </roll>
                <pitch> 0 </pitch>
                <yaw> 0 </yaw>
            </orient>
            <feed>0</feed>
            <thruster file="APC14x85E">
				<sense> 1 </sense>
                <p_factor>   1.11 </p_factor>
                <location unit="IN">
                	<x> 30.6 </x>
                    <y> 0 </y>
                    <z> 0 </z>
                </location>
                <orient unit="DEG">
                    <roll> 0.0 </roll>
                    <pitch> 0.0 </pitch>
                    <yaw> 0.0 </yaw>
                </orient>
            </thruster>
        </engine>
        <tank type="FUEL">    <!-- Tank number 0 -->
            <location unit="IN">
                <x> 16.36 </x>
                <y> 0 </y>
                <z> -1.89375 </z>
            </location>
            <capacity unit="LBS"> 1.5 </capacity>
			<contents unit="LBS"> 0.0 </contents>
        </tank>
    </propulsion>

    <flight_control name="FCS: rascal">
     <channel name="All">

        <summer name="Pitch Trim Sum">
            <input>fcs/elevator-cmd-norm</input>
            <input>fcs/pitch-trim-cmd-norm</input>
            <clipto>
                <min>-1</min>
                <max>1</max>
            </clipto>
        </summer>

        <aerosurface_scale name="Elevator Control">
            <input>fcs/pitch-trim-sum</input>
            <range>
                <min>-0.5236</min>
                <max>0.5236</max>
            </range>
            <output>fcs/elevator-pos-rad</output>
        </aerosurface_scale>

        <aerosurface_scale name="Elevator Normalized">
            <input>fcs/elevator-pos-rad</input>
            <domain>
                <min>-0.5236</min>
                <max> 0.5236</max>
            </domain>
            <range>
                <min>-1</min>
                <max> 1</max>
            </range>
            <output>fcs/elevator-pos-norm</output>
        </aerosurface_scale>

        <summer name="Roll Trim Sum">
            <input>fcs/aileron-cmd-norm</input>
            <input>fcs/roll-trim-cmd-norm</input>
            <clipto>
                <min>-1</min>
                <max>1</max>
            </clipto>
        </summer>

        <aerosurface_scale name="Left Aileron Control">
            <input>fcs/roll-trim-sum</input>
            <range>
                <min>-0.5236</min>
                <max>0.5236</max>
            </range>
            <output>fcs/left-aileron-pos-rad</output>
        </aerosurface_scale>

        <aerosurface_scale name="Right Aileron Control">
            <input>-fcs/roll-trim-sum</input>
            <range>
                <min>-0.5236</min>
                <max>0.5236</max>
            </range>
            <output>fcs/right-aileron-pos-rad</output>
        </aerosurface_scale>

        <aerosurface_scale name="Left aileron Normalized">
            <input>fcs/left-aileron-pos-rad</input>
            <domain>
                <min>-0.5236</min>
                <max> 0.5236</max>
            </domain>
            <range>
                <min>-1</min>
                <max> 1</max>
            </range>
            <output>fcs/left-aileron-pos-norm</output>
        </aerosurface_scale>

        <aerosurface_scale name="Right aileron Normalized">
            <input>fcs/right-aileron-pos-rad</input>
            <domain>
                <min>-0.5236</min>
                <max> 0.5236</max>
            </domain>
            <range>
                <min>-1</min>
                <max> 1</max>
            </range>
            <output>fcs/right-aileron-pos-norm</output>
        </aerosurface_scale>

        <summer name="Rudder Command Sum">
            <input>fcs/rudder-cmd-norm</input>
            <input>fcs/yaw-trim-cmd-norm</input>
            <clipto>
                <min>-1</min>
                <max>1</max>
            </clipto>
        </summer>

        <aerosurface_scale name="Rudder Control">
            <input>fcs/rudder-command-sum</input>
            <range>
                <min>-0.35</min>
                <max>0.35</max>
            </range>
            <output>fcs/rudder-pos-rad</output>
        </aerosurface_scale>

        <aerosurface_scale name="Rudder Normalized">
            <input>fcs/rudder-pos-rad</input>
            <domain>
                <min>-0.35</min>
                <max> 0.35</max>
            </domain>
            <range>
                <min>-1</min>
                <max> 1</max>
            </range>
            <output>fcs/rudder-pos-norm</output>
        </aerosurface_scale>
     </channel>
    </flight_control>

    <aerodynamics>
		<function name="aero/CL_alpha_12345">
			<sum>
				<value>0.086736</value> <!--CL_0-->
				<product>
					<property>aero/alpha-rad</property>
					<value>4.020328 </value> <!--CL_alpha-->
				</product>
			</sum>
		</function>
		<axis name="DRAG">
            <function name="aero/coefficient/CDp">
                <description>Parasitic drag</description>
                <product>
                    <property>aero/qbar-psf</property>
                    <property>metrics/Sw-sqft</property>
					<value>0.0102 </value> <!--CD_p-->
                </product>
            </function>
            <function name="aero/coefficient/CDi">
                <description>Induced_drag</description>
                <product>
                    <property>aero/qbar-psf</property>
                    <property>metrics/Sw-sqft</property>
					<quotient>
						<pow>
							<property>aero/CL_alpha_12345</property>
							<value>2</value>
						</pow>
						<product>
							<value>3.141592653589793</value><!--PI-->
							<value>0.9935</value><!--Oswalds efficiency-->
							<quotient> <!--Aspect ratio -->
								<pow>
									<property>/fdm/jsbsim/metrics/bw-ft</property>
									<value>2</value>
								</pow>
								<property>metrics/Sw-sqft</property>
							</quotient>
						</product>
					</quotient>
                </product>
            </function>
            <function name="aero/coefficient/CDq">
                <description>Drag_due_to_pitch_rate</description>
                <product>
                    <property>aero/qbar-psf</property>
                    <property>metrics/Sw-sqft</property>
					<property>/fdm/jsbsim/aero/ci2vel </property>
					<property>/fdm/jsbsim/velocities/q-aero-rad_sec</property>
					<value>0.0 </value> <!--CD_q (unknown)-->
                </product>
            </function>
            <function name="aero/coefficient/CDbeta">
                <description>Drag_due_to_sideslip</description>
                <product>
                    <property>aero/qbar-psf</property>
                    <property>metrics/Sw-sqft</property>
					<sum>
						<product>
							<pow>
								<property> /fdm/jsbsim/aero/beta-rad </property>
								<value>2</value>
							</pow>
							<value> 0.147812</value> <!-- CDbeta2-->
						</product>
						<product>
							<property> /fdm/jsbsim/aero/beta-rad </property>
							<value> -0.005843 </value> <!-- CDbeta1-->
						</product>
					</sum>
                </product>
            </function>
			<function name="aero/coefficient/CDde">
                <description>Drag_due_to_Elevator_Deflection</description>
                <product>
                    <property>aero/qbar-psf</property>
                    <property>metrics/Sw-sqft</property>
					<pow>
                        <property> fcs/elevator-pos-rad </property>
                        <value>2</value>
                    </pow>
					<value>0.063347</value><!--CD_delta_e-->
                </product>
            </function>
        </axis>

		<axis name="SIDE">
            <function name="aero/coefficient/CYb">
                <description>Side_force_due_to_beta</description>
                <product>
                    <property>aero/qbar-psf</property>
                    <property>metrics/Sw-sqft</property>
                    <property>aero/beta-rad</property>
					<value>-0.22387</value><!--CY_beta-->
                </product>
            </function>
            <function name="aero/coefficient/CYp">
                <description>Side_force_due_to_roll_rate</description>
                <product>
                    <property>aero/qbar-psf</property>
                    <property>metrics/Sw-sqft</property>
					<property>/fdm/jsbsim/aero/bi2vel </property>
					<property>/fdm/jsbsim/velocities/p-aero-rad_sec</property>
					<value>-0.185 </value> <!--CY_p-->
                </product>
            </function>
            <function name="aero/coefficient/CYr">
                <description>Side_force_due_to_yaw_rate</description>
                <product>
                    <property>aero/qbar-psf</property>
                    <property>metrics/Sw-sqft</property>
					<property>/fdm/jsbsim/aero/bi2vel </property>
					<property>/fdm/jsbsim/velocities/r-aero-rad_sec</property>
					<value>0.005 </value> <!--CY_r-->
                </product>
            </function>
            <function name="aero/coefficient/CYdelta_a">
                <description>Side_force_due_to_yaw_rate</description>
                <product>
                    <property>aero/qbar-psf</property>
                    <property>metrics/Sw-sqft</property>
					<property>fcs/left-aileron-pos-rad</property>
					<value>0.04328 </value> <!--CY_delta_a-->
                </product>
            </function>
        </axis>

		<axis name="LIFT">
            <function name="aero/coefficient/CL0">
                <description>Lift_at_zero_alpha</description>
                <product>
                    <property>aero/qbar-psf</property>
                    <property>metrics/Sw-sqft</property>
					<value>0.086736</value> <!--CL_0-->
                </product>
            </function>
            <function name="aero/coefficient/CLalpha">
                <description>Lift_due_to_alpha</description>
                <product>
                    <property>aero/qbar-psf</property>
                    <property>metrics/Sw-sqft</property>
					<product>
						<property>aero/alpha-rad</property>
						<value>4.0203 </value> <!--CL_alpha-->
					</product>
                </product>
            </function>
            <function name="aero/coefficient/CLde">
                <description>Lift_due_to_Elevator_Deflection</description>
                <product>
                    <property>aero/qbar-psf</property>
                    <property>metrics/Sw-sqft</property>
                    <property>fcs/elevator-pos-rad</property>
					<value>0.2781</value><!--CL_delta_e-->
                </product>
            </function>
            <function name="aero/coefficient/CLq">
                <description>Lift_due_to_pitch_rate</description>
                <product>
                    <property>aero/qbar-psf</property>
                    <property>metrics/Sw-sqft</property>
					<property>/fdm/jsbsim/aero/ci2vel </property>
					<property>/fdm/jsbsim/velocities/q-aero-rad_sec</property>
					<value>2.65 </value> <!--CL_q-->
                </product>
            </function>
        </axis>

		<axis name="ROLL">
            <function name="aero/coefficient/Cl0">
                <description>Roll_moment_at_zero_beta</description>
				<value>0</value><!--Cl0-->
			</function>
            <function name="aero/coefficient/Clb">
                <description>Roll_moment_due_to_beta</description>
                <product>
                    <property>aero/qbar-psf</property>
                    <property>metrics/Sw-sqft</property>
                    <property>metrics/bw-ft</property>
                    <property>aero/beta-rad</property>
					<value>-0.0849</value><!--Clb-->
                </product>
            </function>
            <function name="aero/coefficient/Clp">
                <description>Roll_moment_due_to_roll_rate</description>
                <product>
                    <property>aero/qbar-psf</property>
                    <property>metrics/Sw-sqft</property>
                    <property>metrics/bw-ft</property>
                    <property>aero/bi2vel</property>
                    <property>velocities/p-aero-rad_sec</property>
					<value>-0.409</value><!--Clp-->
                </product>
            </function>
            <function name="aero/coefficient/Clr">
                <description>Roll_moment_due_to_yaw_rate</description>
                <product>
                    <property>aero/qbar-psf</property>
                    <property>metrics/Sw-sqft</property>
                    <property>metrics/bw-ft</property>
                    <property>aero/bi2vel</property>
                    <property>velocities/r-aero-rad_sec</property>
                    <value>0.039</value>
                </product>
            </function>
            <function name="aero/coefficient/Clda">
                <description>Roll_moment_due_to_aileron</description>
                <product>
                    <property>aero/qbar-psf</property>
                    <property>metrics/Sw-sqft</property>
                    <property>metrics/bw-ft</property>
                    <property>fcs/left-aileron-pos-rad</property>
					<value> 0.1202 </value><!--Cl_delta_a-->
                </product>
            </function>
        </axis>

		<axis name="PITCH">
            <function name="aero/coefficient/Cm0">
                <description>Pitch_moment_at_zero_alpha</description>
                <product>
                    <property>aero/qbar-psf</property>
                    <property>metrics/Sw-sqft</property>
                    <property>metrics/cbarw-ft</property>
					<value>0.018</value><!--Cm0-->
                </product>
            </function>
            <function name="aero/coefficient/Cmalpha">
                <description>Pitch_moment_due_to_alpha</description>
                <product>
                    <property>aero/qbar-psf</property>
                    <property>metrics/Sw-sqft</property>
                    <property>metrics/cbarw-ft</property>
                    <property>aero/alpha-rad</property>
					<value>-0.2524</value><!--Cm_alpha-->
                </product>
            </function>
            <function name="aero/coefficient/Cmde">
                <description>Pitch_moment_due_to_elevator</description>
                <product>
                    <property>aero/qbar-psf</property>
                    <property>metrics/Sw-sqft</property>
                    <property>metrics/cbarw-ft</property>
                    <property>fcs/elevator-pos-rad</property>
					<value>-0.2292 </value><!--Cm_delta_e-->
                </product>
            </function>
            <function name="aero/coefficient/Cmq">
                <description>Pitch_moment_due_to_pitch_rate</description>
                <product>
                    <property>aero/qbar-psf</property>
                    <property>metrics/Sw-sqft</property>
                    <property>metrics/cbarw-ft</property>
                    <property>aero/ci2vel</property>
                    <property>velocities/q-aero-rad_sec</property>
					<value>-1.32</value><!--Cmq-->
                </product>
            </function>
        </axis>

        <axis name="YAW">
			<function name="aero/coefficient/Cnb">
                <description>Yaw_moment_due_to_beta</description>
                <product>
                    <property>aero/qbar-psf</property>
                    <property>metrics/Sw-sqft</property>
                    <property>metrics/bw-ft</property>
                    <property>aero/beta-rad</property>
                    <value>0.0283</value>
                </product>
            </function>
            <function name="aero/coefficient/Cnp">
                <description>Yaw_moment_due_to_roll_rate</description>
                <product>
                    <property>aero/qbar-psf</property>
                    <property>metrics/Sw-sqft</property>
                    <property>metrics/bw-ft</property>
                    <property>aero/bi2vel</property>
                    <property>velocities/p-aero-rad_sec</property>
                    <value>0.027</value>
                </product>
            </function>
            <function name="aero/coefficient/Cnr">
                <description>Yaw_moment_due_to_yaw_rate</description>
                <product>
                    <property>aero/qbar-psf</property>
                    <property>metrics/Sw-sqft</property>
                    <property>metrics/bw-ft</property>
                    <property>aero/bi2vel</property>
                    <property>velocities/r-aero-rad_sec</property>
                    <value>-0.072</value>
                </product>
            </function>
            <function name="aero/coefficient/Cnda">
                <description>Yaw_moment_due_to_aileron</description>
                <product>
                    <property>aero/qbar-psf</property>
                    <property>metrics/Sw-sqft</property>
                    <property>metrics/bw-ft</property>
                    <property>fcs/left-aileron-pos-rad</property>
                    <value>-0.0034</value>
                </product>
            </function>
        </axis>
    </aerodynamics>
</fdm_config>
